<Lems>

    <!-- Specify which component to run -->
    <Target component="sim1"/>

    <!-- Include core NeuroML2 ComponentType definitions -->
    <Include file="Cells.xml"/>
    <Include file="Networks.xml"/>
    <Include file="Inputs.xml"/>
    <Include file="Simulation.xml"/>

    <Include file="IzhikevichCell2008.xml"/>
    <Include file="SmallNetwork.nml"/>

    <Simulation id="sim1" length="110ms" step="0.01ms" target="net1">

        <Display id="A" title="Network" timeScale="1ms" xmin="-20" xmax="120" ymin="-70" ymax="60">
            <Line id ="pre" quantity="popA/0/RS/v" scale="1mV"  color="#FF0000" timeScale="1ms"/>
            <Line id ="post" quantity="popB/0/RS/v" scale="1mV"  color="#FFFF00" timeScale="1ms"/>
        </Display>

        <Display id="Synapse" title="Input synapse current" timeScale="1ms" xmin="-20" xmax="120" ymin="-20" ymax="140">
            <Line id ="iSyn" quantity="popB/0/RS/syn0/i" scale="1pA"  color="#FFFF00" timeScale="1ms"/>
        </Display>

    </Simulation>

</Lems>
