<Lems>

    <!-- Specify which component to run -->
    <Target component="sim1"/>

    <!-- Include core NeuroML2 ComponentType definitions -->
    <Include file="Cells.xml"/>
    <Include file="Networks.xml"/>
    <Include file="Inputs.xml"/>
    <Include file="Simulation.xml"/>

    <Include file="GeneralizedIzhikevichCell.xml"/>
    <Include file="WhichModel.nml"/>

    <Simulation id="sim1" length="350ms" step="0.01ms" target="net1">

        <!--<Display id="A" title="(A) tonic spiking" timeScale="1ms" xmin="-20" xmax="120" ymin="-90" ymax="40">
            <Line id ="iz1" quantity="popA[0]/v" scale="1mV"  color="#FF0000" timeScale="1ms"/>
            <Line id ="i0" quantity="popA[0]/iA/I" scale="1"  color="#222222" timeScale="1ms"/>
        </Display>
        <Display id="B" title="(B) phasic spiking" timeScale="1ms" xmin="-20" xmax="220" ymin="-90" ymax="40">
            <Line id ="iz1" quantity="popB[0]/v" scale="1mV"  color="#FF0000" timeScale="1ms"/>
            <Line id ="i0" quantity="popB[0]/iB/I" scale="1"  color="#222222" timeScale="1ms"/>
        </Display>
        <Display id="C" title="(C) tonic bursting" timeScale="1ms" xmin="-20" xmax="240" ymin="-90" ymax="40">
            <Line id ="iz1" quantity="popC[0]/v" scale="1mV"  color="#FF0000" timeScale="1ms"/>
            <Line id ="i0" quantity="popC[0]/iC/I" scale="1"  color="#222222" timeScale="1ms"/>
        </Display>
        <Display id="D" title="(D) phasic bursting" timeScale="1ms" xmin="-20" xmax="220" ymin="-90" ymax="40">
            <Line id ="iz1" quantity="popD[0]/v" scale="1mV"  color="#FF0000" timeScale="1ms"/>
            <Line id ="i0" quantity="popD[0]/iD/I" scale="1"  color="#222222" timeScale="1ms"/>
        </Display>-->
        <Display id="E" title="(E) mixed mode" timeScale="1ms" xmin="-20" xmax="200" ymin="-90" ymax="40">
            <Line id ="iz1" quantity="popE[0]/v" scale="1mV"  color="#FF0000" timeScale="1ms"/>
            <Line id ="i0" quantity="popE[0]/iE/I" scale="1"  color="#222222" timeScale="1ms"/>
        </Display>
        <Display id="F" title="(F) spike freq. adapt" timeScale="1ms" xmin="-10" xmax="100" ymin="-90" ymax="40">
            <Line id ="iz1" quantity="popF[0]/v" scale="1mV"  color="#FF0000" timeScale="1ms"/>
            <Line id ="i0" quantity="popF[0]/iF/I" scale="1"  color="#222222" timeScale="1ms"/>
        </Display>
        <Display id="G" title="(G) Class 1 excitable" timeScale="1ms" xmin="-20" xmax="320" ymin="-90" ymax="40">
            <Line id ="iz1" quantity="popG[0]/v" scale="1mV"  color="#FF0000" timeScale="1ms"/>
            <Line id ="iz2" quantity="popG[0]/U" scale="1"    color="#BBA0AA" timeScale="1ms"/>
            <Line id ="i0" quantity="popG[0]/iG/I" scale="1"  color="#222222" timeScale="1ms"/>
        </Display>
        <Display id="H" title="(H) Class 2 excitable" timeScale="1ms" xmin="-20" xmax="320" ymin="-90" ymax="40">
            <Line id ="iz1" quantity="popH[0]/v" scale="1mV"  color="#FF0000" timeScale="1ms"/>
            <Line id ="iz2" quantity="popH[0]/U" scale="1"    color="#BBA0AA" timeScale="1ms"/>
            <Line id ="i0" quantity="popH[0]/iH/I" scale="1"  color="#222222" timeScale="1ms"/>
        </Display>
       <!-- <Display id="I" title="(I) spike latency" timeScale="1ms" xmin="-20" xmax="320" ymin="-90" ymax="40">
            <Line id ="iz1" quantity="popI[0]/v" scale="1mV"  color="#FF0000" timeScale="1ms"/>
            <Line id ="i0" quantity="popI[0]/iI/I" scale="1"  color="#222222" timeScale="1ms"/>
        </Display>
        <Display id="J" title="(J) subthreshold oscillations" timeScale="1ms" xmin="-20" xmax="320" ymin="-90" ymax="40">
            <Line id ="iz1" quantity="popJ[0]/v" scale="1mV"  color="#FF0000" timeScale="1ms"/>
            <Line id ="i0" quantity="popJ[0]/iJ/I" scale="1"  color="#222222" timeScale="1ms"/>
        </Display>
        <Display id="K" title="(K) resonator" timeScale="1ms" xmin="-20" xmax="320" ymin="-90" ymax="40">
            <Line id ="iz1" quantity="popK[0]/v" scale="1mV"  color="#FF0000" timeScale="1ms"/>
            <Line id ="i1" quantity="popK[0]/iK1/I" scale="0.1"  color="#222222" timeScale="1ms"/>
            <Line id ="i2" quantity="popK[0]/iK2/I" scale="0.1"  color="#224444" timeScale="1ms"/>
            <Line id ="i3" quantity="popK[0]/iK3/I" scale="0.1"  color="#226666" timeScale="1ms"/>
            <Line id ="i4" quantity="popK[0]/iK4/I" scale="0.1"  color="#228888" timeScale="1ms"/>
        </Display>
	<Display id="L" title="(L) integrator" timeScale="1ms" xmin="-20" xmax="320" ymin="-90" ymax="40">
            <Line id ="iz1" quantity="popL[0]/v" scale="1mV"  color="#FF0000" timeScale="1ms"/>
            <Line id ="i1" quantity="popL[0]/iL1/I" scale="0.1"  color="#222222" timeScale="1ms"/>
            <Line id ="i2" quantity="popL[0]/iL2/I" scale="0.1"  color="#224444" timeScale="1ms"/>
            <Line id ="i3" quantity="popL[0]/iL3/I" scale="0.1"  color="#226666" timeScale="1ms"/>
            <Line id ="i4" quantity="popL[0]/iL4/I" scale="0.1"  color="#228888" timeScale="1ms"/>
        </Display>
	<Display id="M" title="(M) rebound spike" timeScale="1ms" xmin="-20" xmax="320" ymin="-90" ymax="40">
            <Line id ="iz1" quantity="popM[0]/v" scale="1mV"  color="#FF0000" timeScale="1ms"/>
            <Line id ="i0" quantity="popM[0]/iM/I" scale="1"  color="#222222" timeScale="1ms"/>
        </Display>
	<Display id="N" title="(N) rebound burst" timeScale="1ms" xmin="-20" xmax="320" ymin="-90" ymax="40">
            <Line id ="iz1" quantity="popN[0]/v" scale="1mV"  color="#FF0000" timeScale="1ms"/>
            <Line id ="i0" quantity="popN[0]/iN/I" scale="1"  color="#222222" timeScale="1ms"/>
        </Display>
	<Display id="O" title="(O) threshold variability" timeScale="1ms" xmin="-20" xmax="320" ymin="-90" ymax="40">
            <Line id ="iz1" quantity="popO[0]/v" scale="1mV"  color="#FF0000" timeScale="1ms"/>
            <Line id ="i1" quantity="popO[0]/iO1/I" scale="0.1"  color="#222222" timeScale="1ms"/>
            <Line id ="i2" quantity="popO[0]/iO2/I" scale="0.1"  color="#224444" timeScale="1ms"/>
            <Line id ="i3" quantity="popO[0]/iO3/I" scale="0.1"  color="#226666" timeScale="1ms"/>
        </Display>
        <Display id="P" title="(P) bistability" timeScale="1ms" xmin="-20" xmax="320" ymin="-90" ymax="40">
            <Line id ="iz1" quantity="popP[0]/v" scale="1mV"  color="#FF0000" timeScale="1ms"/>
            <Line id ="i1" quantity="popP[0]/iP1/I" scale="0.1"  color="#222222" timeScale="1ms"/>
            <Line id ="i2" quantity="popP[0]/iP2/I" scale="0.1"  color="#224444" timeScale="1ms"/>
            <Line id ="i3" quantity="popP[0]/iP3/I" scale="0.1"  color="#226666" timeScale="1ms"/>
        </Display>
	<Display id="Q" title="(Q) DAP" timeScale="1ms" xmin="-20" xmax="320" ymin="-90" ymax="40">
            <Line id ="iz1" quantity="popQ[0]/v" scale="1mV"  color="#FF0000" timeScale="1ms"/>
            <Line id ="i0" quantity="popQ[0]/iQ/I" scale="0.1"  color="#222222" timeScale="1ms"/>
        </Display>
	<Display id="R" title="(R) Accomodation" timeScale="1ms" xmin="-20" xmax="320" ymin="-90" ymax="40">
            <Line id ="iz1" quantity="popR[0]/v" scale="1mV"  color="#FF0000" timeScale="1ms"/>
            <Line id ="i1" quantity="popR[0]/iR1/I" scale="0.1"  color="#222222" timeScale="1ms"/>
            <Line id ="i2" quantity="popR[0]/iR2/I" scale="0.1"  color="#224444" timeScale="1ms"/>
        </Display>
	<Display id="S" title="(S) IIS" timeScale="1ms" xmin="-20" xmax="320" ymin="-90" ymax="40">
            <Line id ="iz1" quantity="popS[0]/v" scale="1mV"  color="#FF0000" timeScale="1ms"/>
            <Line id ="i1" quantity="popS[0]/iS1/I" scale="0.1"  color="#222222" timeScale="1ms"/>
            <Line id ="i2" quantity="popS[0]/iS2/I" scale="0.1"  color="#224444" timeScale="1ms"/>
        </Display>
	<Display id="T" title="(T) IIB" timeScale="1ms" xmin="-20" xmax="320" ymin="-90" ymax="40">
            <Line id ="iz1" quantity="popT[0]/v" scale="1mV"  color="#FF0000" timeScale="1ms"/>
            <Line id ="i1" quantity="popT[0]/iT1/I" scale="0.1"  color="#222222" timeScale="1ms"/>
            <Line id ="i2" quantity="popT[0]/iT2/I" scale="0.1"  color="#224444" timeScale="1ms"/>
        </Display>-->

    </Simulation>

</Lems>
